# this test document contains:
# - single-layer inductance calculation formula(s)
# - multi-layer inductance calculation
# - the search for a way to improve the coefficients of the multi-layer calculation
# modified wheeler, going in reverse from desired induction (to check a web-calculators validity)
# unit for K1 was not specified, so i manually added one which resolves to make
K_1 := 2.34 1/A
L := 1 μH
D := 10 mm
K_2 := 2.75
d := 5 mm
μ_0 := 4*π*10^-7 N/A
φ := (D - d)/(D + d) = 0.333333
D_avg := (D + d)/2 = 7.5 mm
N_turns := sqrt(L/((K_1*μ_0*D_avg)/(1 + K_2*φ))) = 9.32244
D_spacing := (D - d)/(N_turns*2) = 0.26817 mm
# resistance calculation
mΩ := 0.001 Ω
ρ_copper := 1.72*10^-8 Ω*m
length := 1.0 mm
H_trace := 50 μm
W_trace := 0.125 mm
R_trace := ρ_copper*length/(H_trace*W_trace) = 2.752 mΩ
K_pcb_resist_const := ρ_copper/H_trace
R_trace := K_pcb_resist_const*length/W_trace = 2.752 mΩ
# 'current sheet' math (shown in 2 seperate papers!)
N_turns := 9
μ_0 := 4*π*10^-7 N/A
C_square := [1.27; 2.07; 0.18; 0.13]
D := 39.5 mm
d := 19.8 mm
C_hexagon := [1.09; 2.23; 0.00; 0.17]
φ := (D - d)/(D + d) = 0.332209
D_avg := (D + d)/2 = 29.65 mm
C_octagon := [1.07; 2.29; 0.00; 0.19]
C_circle := [1.00; 2.46; 0.00; 0.20]
C := C_circle  # quick selection
L_single := μ_0*N_turns^2*D_avg*C[0]/(2 A)*(ln(C[1]/φ) + C[2]*φ + C[3]*φ^2) = 3.05456 μH
# /\ NOTE: 'A' is only there to
# | resolve the lack of units in C
# ignore the Ampere
# multilayer paper
N_turns := 9
X_total := 0.6
X_copper := 0.030
N_layers := 2
A_k := [0.184; -0.525; 1.038; 1.001]  # paper [2] calls these A,B,C and D respecitvely. I think A_k is more legible
X := (X_total - X_copper)/(N_layers - 1) = 0.57
B_k := [1.67; -5.84; 65]
C_k := 0.64
# coupling value:
K_C(X__f) := N_turns^2/((A_k[0]*X__f^3 + A_k[1]*X__f^2 + A_k[2]*X__f + A_k[3])*(B_k[0]*N_turns^2 + B_k[1]*N_turns + B_k[2])*C_k)
L_multi := L_single*(N_layers + 2*sum((N_layers - i)*K_C(i*X), i = 1 .. N_layers)) = 9.70382 μH
K_CA(X__f) := A_k[0]*X__f^3 + A_k[1]*X__f^2 + A_k[2]*X__f + A_k[3]
K_CB(N_turns_f) := N_turns_f^2/(B_k[0]*N_turns_f^2 + B_k[1]*N_turns_f + B_k[2])  # constant for any number of layers, varies with turns
L_multi := L_single*(N_layers + 2*sum((N_layers - i)/K_CA(i*X), i = 1 .. N_layers)*K_CB(N_turns)*(1/C_k)) = 9.70382 μH
# my own maths:
L_multi := L_single*(N_layers + 2*sum((N_layers - i)/K_CA(i*X), i = 1 .. N_layers))
